// SBML level 3 version 2
// Created with https://github.com/matthiaskoenig/sbmlutils.

model chlorzoxazone_intestine(Mr_ethanol, Vext, Vgu, Vlumen, Vfeces, czx_lumen, czx_ext, czx_feces, ethanol_ext)
  // Model for chlorzoxazone absorption in the small intestine
  // Terms of use
  // The content of this model has been carefully created in a manual research effort. This file has been created by Matthias König using sbmlutils. For questions contact koenigmx@hu-berlin.de. Copyright © 2023 Matthias König.
  // This work is licensed under a Creative Commons Attribution 4.0 International License.
  // Redistribution and use of any part of this model, with or without modification, are permitted provided that the following conditions are met:
  // Redistributions of this SBML file must retain the above copyright notice, this list of conditions and the following disclaimer.
  // Redistributions in a different form must reproduce the above copyright notice, this list of conditions and the following disclaimer in the documentation and/or other materials provided with the distribution.
  // This model is distributed in the hope that it will be useful, but WITHOUT ANY WARRANTY; without even the implied warranty of MERCHANTABILITY or FITNESS FOR A PARTICULAR PURPOSE.
  // model units - substance: mmole, time: min, volume: litre, area: m2, length: metre, extent: mmole

  // Compartments:
  compartment Vext = 1 litre; Vext is "plasma";  // SBO:0000290 ncit:C13356 BTO:0000131
  compartment Vgu = 1.2825 litre; Vgu is "intestine";  // SBO:0000290 FMA:45615 BTO:0000545 ncit:C12736
  compartment Vlumen = 1.15425 litre; Vlumen is "intestinal lumen (inner part of intestine)";  // SBO:0000290 FMA:14586 UBERON:0018543
  compartment Vfeces = 1 litre;  // SBO:0000290 FMA:64183 ncit:C13234 BTO:0000440
  compartment Ventero = 1 litre; Ventero is "intestinal lining (enterocytes)";  // SBO:0000290
  compartment Vapical = NaN; Vapical has m2; Vapical is "apical membrane (intestinal membrane enterocytes)";  // SBO:0000290 FMA:84666 GO:0016324
  compartment Vbaso = NaN; Vbaso has m2; Vbaso is "basolateral membrane (intestinal membrane enterocytes)";  // SBO:0000290 FMA:84669 GO:0016323

  // Species:
  species czx_lumen in Vlumen = 0; czx_lumen is "chlorzoxazone (intestinal volume)";  // SBO:0000247 pubchem.compound:2733 CHEBI:3655 ncit:C28926
  species czx_ext in Vext = 0; czx_ext is "chlorzoxazone (plasma)";  // SBO:0000247 pubchem.compound:2733 CHEBI:3655 ncit:C28926
  substanceOnly species czx_feces in Vfeces = 0; czx_feces is "chlorzoxazone (feces)";  // SBO:0000247 pubchem.compound:2733 CHEBI:3655 ncit:C28926
  species ethanol_ext in Vext = 0; ethanol_ext is "ethanol (plasma)";  // SBO:0000247 CHEBI:16236 pubchem.compound:702 inchikey:LFQSCWFLJHTTHZ-UHFFFAOYSA-N

  // Parameters:
  PODOSE_ethanol = 0 mg; PODOSE_ethanol is "oral ethanol dose [mg]";
  // Fraction absorbed, i.e., only a fraction of the chlorzoxazone in the intestinal lumen is absorbed. This parameter determines how much of the chlorzoxazone is excreted in every round of the enterohepatic circulation.
  // F_czx_abs of dose is absorbed. (1-F_czx_abs) is excreted in feces.
  F_czx_abs = 0.606 dimensionless; F_czx_abs is "fraction absorbed chlorzoxazone (tablet)";  // SBO:0000002
  Ka_abs_czx = 1.457 per_hr; Ka_abs_czx is "Ka_abs [1/hr] absorption chlorzoxazone";  // SBO:0000002
  f_Ka_czx = 1 dimensionless; f_Ka_czx is "scaling factor for czx absorption rate";  // SBO:0000002
  Ka_abs_eth = 2.594 per_hr; Ka_abs_eth is "Ka_abs [1/hr] absorption ethanol";  // SBO:0000002
  Mr_ethanol = 46.07 g_per_mole; Mr_ethanol is "Molecular weight ethanol [g/mole]";  // SBO:0000647
  absorption has mmole_per_min; absorption is "absorption chlorzoxazone";

  // Assignment rules:
  absorption := Vgu*Ka_abs_czx/(60 min_per_hr)*czx_lumen;

  // Rate rules:
  PODOSE_ethanol' = -ETHABS*Mr_ethanol;

  // Reactions:
  CZXABS: czx_lumen => czx_ext; F_czx_abs*f_Ka_czx*absorption; CZXABS is "absorption chlorzoxazone";  // SBO:0000655
  ETHABS: => ethanol_ext; Ka_abs_eth/(60 min_per_hr)*PODOSE_ethanol/Mr_ethanol; ETHABS is "absorption ethanol";  // SBO:0000655
  // Fraction excreted (not available for absorption)
  CZXEXC: czx_lumen => czx_feces; (1 - F_czx_abs)*absorption; CZXEXC is "excretion chlorzoxazone (feces)";  // SBO:0000655

  // Unit definitions:
  unit g_per_mole = gram / mole; g_per_mole is "g/mole";
  unit l_per_min = litre / (60 second); l_per_min is "l/min";
  unit l_per_min_mmole = litre / (60 second * 1e-3 mole); l_per_min_mmole is "l/min/mmole";
  unit m2 = metre^2; m2 is "meter^2";
  unit mM = 1e-3 mole / litre; mM is "mmole/liter";
  unit mg = 1e-3 gram;
  unit mg_per_min = 1e-3 gram / (60 second); mg_per_min is "mg/min";
  unit min = 60 second;
  unit min_per_hr = 60 second / (3600 second); min_per_hr is "min/hr";
  unit mmole = 1e-3 mole;
  unit mmole_per_l = 1e-3 mole / litre; mmole_per_l is "mmole/liter";
  unit mmole_per_min = 1e-3 mole / (60 second); mmole_per_min is "mmole/min";
  unit mmole_per_min_kg = 1e-3 mole / (60 second * 1000 gram); mmole_per_min_kg is "mmole/min/kg";
  unit mmole_per_min_l = 1e-3 mole / (60 second * litre); mmole_per_min_l is "mmole/min/liter";
  unit per_hr = 1 / (3600 second); per_hr is "1/hr";
  unit per_min = 1 / (60 second); per_min is "1/min";
  unit per_min_l = 1 / (60 second * litre); per_min_l is "1/min/liter";
end
