// SBML level 3 version 2
// Created with https://github.com/matthiaskoenig/sbmlutils.

model chlorzoxazone_kidney(Vext, Vki, Vurine, czxoglu_ext, czxoglu_urine)
  // Model for chlorzoxazone-glucuronides elimination in the kidneys
  // Model for renal excretion of chlorzoxazone-o-glucuronide. encoded in SBML format.
  // Import and secretion are not modeled explicitly but a lumped excretion reaction is used to describe urinary elimination of czx and czx6oh.
  // ~60% recovered as 6-hydroxychlorzoxazone + 6-hydrochlorzoxzone in urine {Burckart1998}
  // 74 ± 3.4% (mean ± SEM) of the dose was excreted as 6-hydroxychlorzoxazone + 6-hydroxychlorzoxazone glucuronide {Desiraju1982}
  // Terms of use
  // The content of this model has been carefully created in a manual research effort. This file has been created by Matthias König using sbmlutils. For questions contact koenigmx@hu-berlin.de. Copyright © 2023 Matthias König.
  // This work is licensed under a Creative Commons Attribution 4.0 International License.
  // Redistribution and use of any part of this model, with or without modification, are permitted provided that the following conditions are met:
  // Redistributions of this SBML file must retain the above copyright notice, this list of conditions and the following disclaimer.
  // Redistributions in a different form must reproduce the above copyright notice, this list of conditions and the following disclaimer in the documentation and/or other materials provided with the distribution.
  // This model is distributed in the hope that it will be useful, but WITHOUT ANY WARRANTY; without even the implied warranty of MERCHANTABILITY or FITNESS FOR A PARTICULAR PURPOSE.
  // model units - substance: mmole, time: min, volume: litre, area: m2, length: metre, extent: mmole

  // Compartments:
  compartment Vext = 4 litre; Vext is "plasma";  // SBO:0000290 ncit:C13356 BTO:0000131
  compartment Vki = 1.5 litre; Vki is "kidney";  // SBO:0000290 FMA:7203 BTO:0000671 ncit:C12415
  compartment Vurine = 1 litre;  // SBO:0000290 FMA:12274 ncit:C13283 BTO:0001419

  // Species:
  species czxoglu_ext in Vext = 0; czxoglu_ext is "chorzoxazone-o-glucuronide (plasma)";  // SBO:0000247 inchikey:XZSZLTOSEPTADQ-LIJGXYGRSA-N
  // Urinary species are in amounts.
  substanceOnly species czxoglu_urine in Vurine = 0; czxoglu_urine is "chorzoxazone-o-glucuronide (urine)";  // SBO:0000247 inchikey:XZSZLTOSEPTADQ-LIJGXYGRSA-N

  // Parameters:
  // determined via parameter fitting
  CZXOGLU_EX_k = 2.611 per_min; CZXOGLU_EX_k is "rate urinary excretion chlorzoxazone metabolites";  // SBO:0000009

  // Reactions:
  CZXOGLU_EX: czxoglu_ext => czxoglu_urine; CZXOGLU_EX_k*Vki*czxoglu_ext; CZXOGLU_EX is "excretion chlorzoxazone-o-glucuronide";  // SBO:0000655 ncit:C75913

  // Unit definitions:
  unit g_per_mole = gram / mole; g_per_mole is "g/mole";
  unit l_per_min = litre / (60 second); l_per_min is "l/min";
  unit l_per_min_mmole = litre / (60 second * 1e-3 mole); l_per_min_mmole is "l/min/mmole";
  unit m2 = metre^2; m2 is "meter^2";
  unit mM = 1e-3 mole / litre; mM is "mmole/liter";
  unit mg = 1e-3 gram;
  unit min = 60 second;
  unit mmole = 1e-3 mole;
  unit mmole_per_l = 1e-3 mole / litre; mmole_per_l is "mmole/liter";
  unit mmole_per_min = 1e-3 mole / (60 second); mmole_per_min is "mmole/min";
  unit mmole_per_min_kg = 1e-3 mole / (60 second * 1000 gram); mmole_per_min_kg is "mmole/min/kg";
  unit mmole_per_min_l = 1e-3 mole / (60 second * litre); mmole_per_min_l is "mmole/min/liter";
  unit per_min = 1 / (60 second); per_min is "1/min";
  unit per_min_l = 1 / (60 second * litre); per_min_l is "1/min/liter";
end
