// SBML level 3 version 2
// Created with https://github.com/matthiaskoenig/sbmlutils.

model chlorzoxazone_liver(BW, Vext, Vli, czx_ext, czx6oh_ext, czxoglu_ext, ethanol_ext)
  // Model for chlorzoxazone elimination in the liver
  // Model for hepatic metabolism of chlorzoxazone via CYP2E1 in in SBML.
  // Terms of use
  // The content of this model has been carefully created in a manual research effort. This file has been created by Matthias König using sbmlutils. For questions contact koenigmx@hu-berlin.de. Copyright © 2023 Matthias König.
  // This work is licensed under a Creative Commons Attribution 4.0 International License.
  // Redistribution and use of any part of this model, with or without modification, are permitted provided that the following conditions are met:
  // Redistributions of this SBML file must retain the above copyright notice, this list of conditions and the following disclaimer.
  // Redistributions in a different form must reproduce the above copyright notice, this list of conditions and the following disclaimer in the documentation and/or other materials provided with the distribution.
  // This model is distributed in the hope that it will be useful, but WITHOUT ANY WARRANTY; without even the implied warranty of MERCHANTABILITY or FITNESS FOR A PARTICULAR PURPOSE.
  // model units - substance: mmole, time: min, volume: litre, area: m2, length: metre, extent: mmole

  // Compartments:
  compartment Vext = 4 litre; Vext is "plasma";  // SBO:0000290 ncit:C13356 BTO:0000131
  compartment Vli = 1.5 litre; Vli is "liver";  // SBO:0000290 FMA:7197 BTO:0000759 ncit:C12392

  // Species:
  species czx_ext in Vext = 0; czx_ext is "chlorzoxazone (plasma)";  // SBO:0000247 pubchem.compound:2733 CHEBI:3655 ncit:C28926
  species czx in Vli = 0; czx is "chlorzoxazone (liver)";  // SBO:0000247 pubchem.compound:2733 CHEBI:3655 ncit:C28926
  species czx6oh in Vli = 0; czx6oh is "6-hydroxy-chlorzoxazone (liver)";  // SBO:0000247 CHEBI:184399 pubchem.compound:2734 inchikey:AGLXDWOTVQZHIQ-UHFFFAOYSA-N
  species czx6oh_ext in Vext = 0; czx6oh_ext is "6-hydroxy-chlorzoxazone (plasma)";  // SBO:0000247 CHEBI:184399 pubchem.compound:2734 inchikey:AGLXDWOTVQZHIQ-UHFFFAOYSA-N
  species czxoglu in Vli = 0; czxoglu is "chlorzoxazone-o-glucuronide (liver)";  // SBO:0000247 inchikey:XZSZLTOSEPTADQ-LIJGXYGRSA-N
  species czxoglu_ext in Vext = 0; czxoglu_ext is "chlorzoxazone-o-glucuronide (plasma)";  // SBO:0000247 inchikey:XZSZLTOSEPTADQ-LIJGXYGRSA-N
  species ethanol in Vli = 0; ethanol is "ethanol (liver)";  // SBO:0000247 CHEBI:16236 pubchem.compound:702 inchikey:LFQSCWFLJHTTHZ-UHFFFAOYSA-N
  species ethanol_ext in Vext = 0; ethanol_ext is "ethanol (plasma)";  // SBO:0000247 CHEBI:16236 pubchem.compound:702 inchikey:LFQSCWFLJHTTHZ-UHFFFAOYSA-N
  substanceOnly species cyp2e1 in Vli = 1; cyp2e1 is "CYP2E1";  // substance in dimensionless; conversionFactor cf_units_per_mmole; SBO:0000247

  // Parameters:
  BW = 75 kg; BW is "body weight [kg]";  // SBO:0000002
  cf_units_per_mmole = 1 per_mmole; cf_units_per_mmole is "conversion factor for dimensionless species";  // SBO:0000002
  // (Roberts1995)
  cyp2e1_thalf = 2592 min; cyp2e1_thalf is "CYP2E1 half life";  // SBO:0000002
  CZX_k_IM = 100 per_min; CZX_k_IM is "rate constant for czx import into liver";  // SBO:0000009
  CZX_F_EX = 1.59 dimensionless; CZX_F_EX is "factor that scales import rate constant such that target equilibrium concentrationequals Tissue-Plasma ratio (T/P). Reported in rats: 0.627 +-0.0618 {Kim2002}";  // SBO:0000002
  CZX6OH_k_EX = 100 per_min; CZX6OH_k_EX is "rate constant for 6-oh-chlorzoxazone export";  // SBO:0000009
  CZX6OH_F_IM = 0.221 dimensionless; CZX6OH_F_IM is "scaling factor to rach target equilibrium tissue-plasma ratio (T/P)reported T/P in rats (0.221 +- 0.0092) {Kim et al.}";  // SBO:0000002
  CZXOGLU_k_EX = 100 per_min; CZXOGLU_k_EX is "rate constant for chlorzoxazone-o-glucuronide export";  // SBO:0000009
  CZXOGLU_F_IM = 1 dimensionless; CZXOGLU_F_IM is "scaling factor to rach target equilibrium tissue-plasma ratio (T/P)";  // SBO:0000002
  f_cyp2e1 = 1 dimensionless; f_cyp2e1 is "factor for scanning CYP2E1 activity";  // SBO:0000002
  f_cyp2e1_Km = 1 dimensionless; f_cyp2e1_Km is "factor for scanning CYP2E1 Km";  // SBO:0000002
  CZXOX_Vmax = 0.007527 mmole_per_min_l; CZXOX_Vmax is "Vmax for chlorzoxazone oxidation";  // SBO:0000186
  // 14.4 µM (median) Yang2012 110±10 µM (Km CYP2E1 chlorzoxazone, human liver microsomes) {Emoto2005} 22-64.2 µM (Km CYP2E1 chlorzoxazone, human liver microsomes) {Emoto2003} see also table in chlorzoxazone document
  CZXOX_Km = 0.0189287 mM; CZXOX_Km is "Km for chlorzoxazone oxidation";  // SBO:0000027
  CZXOGLU_Km = 0.000255 mM; CZXOGLU_Km is "mm constant for glucuronidation of czx6oh (Quesnot2018) by UGT1A9, UGT1A6, UGT1A1";  // SBO:0000027
  CZXOGLU_Vmax = 0.011346 mmole_per_min_l; CZXOGLU_Vmax is "maximum velocity for czx-o-glucuronidation";  // SBO:0000186
  f_GLU = 1 dimensionless; f_GLU is "scaling parameter of O-Glucuronidation activity for parameter scans";  // SBO:0000002
  ETH_k_IM = 100 per_min; ETH_k_IM is "rate constant for czx import into liver";  // SBO:0000009
  // Rates of alcohol elimination 8.5 g/hr/70kg (Holford1987) 0.121 g/hr/kg | :46.07 g/mole 2.626e-3 mole/hr/kg | 1hr = 60 min 4.376e-5 mole/min/kg | 1 mole = 1000 mmole 4.376e-2 mmole/min/kg
  ETHEL_VMAX = 0.03295 mmole_per_min_kg; ETHEL_VMAX is "rate of ethanol elimination";  // SBO:0000186
  // FIXME: add reference for the value
  ETHEL_KM = 0.0462 mM; ETHEL_KM is "KM value for ethanol degradation";  // SBO:0000027
  k_cyp2e1_prod has mmole_per_min_l; k_cyp2e1_prod is "rate constant for CYP2E1 production";  // SBO:0000009
  // half life of cyp2e1 is reported to be 6 hrs (Roberts1995).Calculated by kd = ln(2)/t_half
  k_cyp2e1_deg has mmole_per_min_l; k_cyp2e1_deg is "rate constant for CYP2E1 mRNA degradation";  // SBO:0000009
  Ki_cyp2e1_deg_ethanol = 1e-5 mM; Ki_cyp2e1_deg_ethanol is "stabilization constant (inhibition degradation)";  // SBO:0000261
  kd_cyp2e1 has mmole_per_min_l;

  // Assignment rules:
  kd_cyp2e1 := k_cyp2e1_deg/(1 + ethanol/Ki_cyp2e1_deg_ethanol);
  // degradation rate = ln(2)/thalf
  k_cyp2e1_deg := 1 mmole*0.693/cyp2e1_thalf/Vli;
  // production rate = degradation rate at baseline resulting in cyp2e1 = 1.0 dimensionless
  k_cyp2e1_prod := k_cyp2e1_deg;

  // Reactions:
  CZXIM: czx_ext -> czx; CZX_k_IM*Vli*(czx_ext - CZX_F_EX*czx); CZXIM is "chlorzoxazone import";  // SBO:0000655
  CZX6OHEX: czx6oh -> czx6oh_ext; CZX6OH_k_EX*Vli*(czx6oh - CZX6OH_F_IM*czx6oh_ext); CZX6OHEX is "6-oh-chlorzoxazone export";  // SBO:0000655
  CZXOGLU_EX: czxoglu -> czxoglu_ext; CZXOGLU_k_EX*Vli*(czxoglu - CZXOGLU_F_IM*czxoglu_ext); CZXOGLU_EX is "chlorzoxazone-o-glucuronide export";  // SBO:0000655
  // cyp2e1 is normalized to 1
  CZXOX: czx => czx6oh; f_cyp2e1*cyp2e1*CZXOX_Vmax*Vli*czx/(czx + CZXOX_Km*f_cyp2e1_Km); CZXOX is "chlorzoxazone oxidation to 6-hydroxy-chlorzoxazone (CYP2E1)";  // modifiers: cyp2e1; SBO:0000176
  // Catalyzed by UGT enzyme.
  CZXOGLU: czx6oh => czxoglu; f_GLU*CZXOGLU_Vmax*Vli*czx6oh/(czx6oh + CZXOGLU_Km); CZXOGLU is "6-oh-chlorzoxazone glucuronidation (UGT)";  // SBO:0000176
  ETHIM: ethanol_ext -> ethanol; ETH_k_IM*Vli*(ethanol_ext - ethanol); ETHIM is "ethanol import";  // SBO:0000655
  // Ethanol elimination via alcohol dehydrogenase in the liver. Due to saturation of enzyme (ethanol > ETHEL_KM) constant rate of ethanol elimination.
  ETH_ELIMINATION: ethanol => ; ETHEL_VMAX*BW*ethanol/(ethanol + ETHEL_KM); ETH_ELIMINATION is "ethanol elimination (ALD)";  // SBO:0000176
  CYP2E1_PROD: => cyp2e1; Vli*k_cyp2e1_prod; CYP2E1_PROD is "CYP2E1 production";  // SBO:0000655
  // Ethanol stabilizes CYP2E1, i.e., the degradation rate is reduced.
  CYP2E1_DEG: cyp2e1 => ; Vli*kd_cyp2e1*cyp2e1; CYP2E1_DEG is "CYP2E1 degradation";  // modifiers: ethanol; SBO:0000655

  // Unit definitions:
  unit g_per_mole = gram / mole; g_per_mole is "g/mole";
  unit kg = 1000 gram;
  unit l_per_min = litre / (60 second); l_per_min is "l/min";
  unit l_per_min_mmole = litre / (60 second * 1e-3 mole); l_per_min_mmole is "l/min/mmole";
  unit m2 = metre^2; m2 is "meter^2";
  unit mM = 1e-3 mole / litre; mM is "mmole/liter";
  unit mg = 1e-3 gram;
  unit min = 60 second;
  unit mmole = 1e-3 mole;
  unit mmole_l_per_min = 1e-3 mole * litre / (60 second); mmole_l_per_min is "mmole*l/min";
  unit mmole_per_l = 1e-3 mole / litre; mmole_per_l is "mmole/liter";
  unit mmole_per_min = 1e-3 mole / (60 second); mmole_per_min is "mmole/min";
  unit mmole_per_min_kg = 1e-3 mole / (60 second * 1000 gram); mmole_per_min_kg is "mmole/min/kg";
  unit mmole_per_min_l = 1e-3 mole / (60 second * litre); mmole_per_min_l is "mmole/min/liter";
  unit per_min = 1 / (60 second); per_min is "1/min";
  unit per_min_l = 1 / (60 second * litre); per_min_l is "1/min/liter";
  unit per_mmole = 1 / (1e-3 mole); per_mmole is "1/mmole";
end
